*Heading
** Job name: Tri3fFEMdload Model name: Tri3fFEMdload
** Generated by: Abaqus/CAE Student Edition 2019
*Preprint, echo=NO, model=NO, history=NO, contact=NO
**
** PARTS
**
*Part, name=Part-1
*Node
      1,         350.,          50.
      2,         300.,          50.
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*Element, type=CPS3
 1,  1,  2, 23
 2, 23, 22,  1
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*Nset, nset=_PickedSet2, internal, generate
  1,  42,   1
*Elset, elset=_PickedSet2, internal, generate
  1,  40,   1
*Nset, nset=fix-all
 21, 42
*Elset, elset=fix-all
 39,
*Nset, nset=cload-dir2
 22,
*Nset, nset=dload1, generate
  1,  21,   1
*Elset, elset=dload1, generate
  1,  39,   2
** Section: Section-1
*Solid Section, elset=_PickedSet2, material=Material-1
50.,
*End Part
**
**
** ASSEMBLY
**
*Assembly, name=Assembly
**
*Instance, name=Part-1-1, part=Part-1
*End Instance
**
*Nset, nset=Left, instance=Part-1-1
 21, 42
*Elset, elset=Left, instance=Part-1-1
 39,
*Nset, nset=LoadPoint, instance=Part-1-1
 22,
*Nset, nset=Topsurf, instance=Part-1-1, generate
  1,  21,   1
*Elset, elset=Topsurf, instance=Part-1-1, generate
  1,  39,   2
*Elset, elset=_Surf-1_S1, internal, instance=Part-1-1, generate
  1,  39,   2
*Surface, type=ELEMENT, name=Surf-1
_Surf-1_S1, S1
*End Assembly
**
** MATERIALS
**
*Material, name=Material-1
*Elastic
200000., 0.3
**
** BOUNDARY CONDITIONS
**
** Name: BC-1 Type: Symmetry/Antisymmetry/Encastre
*Boundary
Left, ENCASTRE
** ----------------------------------------------------------------
**
** STEP: Step-1
**
*Step, name=Step-1, nlgeom=NO
*Static
1., 1., 1e-05, 1.
**
** LOADS
**
** Name: Load-2   Type: Surface traction
*Dsload, follower=NO, constant resultant=YES
Surf-1, TRVEC, 1., 0., -1., 0.
**
** OUTPUT REQUESTS
**
*Restart, write, frequency=0
**
** FIELD OUTPUT: F-Output-1
**
*Output, field
*Node Output
RF, U
**
** HISTORY OUTPUT: H-Output-1
**
*Output, history, variable=PRESELECT
*End Step
